*Heading
** Job name: Job-2 Model name: Model-1
** Generated by: Abaqus/CAE 2023
*Preprint, echo=NO, model=NO, history=NO, contact=NO
**
** PARTS
**
*Part, name=Block
*Node
      1,          0.5,           0.,  0.150000006
      2,  0.428571433,           0.,  0.150000006
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*Element, type=C3D8R
 1,  25,  26,  34,  33,   1,   2,  10,   9
 2,  26,  27,  35,  34,   2,   3,  11,  10
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*Nset, nset=_PickedSet2, internal, generate
   1,  192,    1
*Elset, elset=_PickedSet2, internal, generate
  1,  98,   1
*Elset, elset=_bot_S5, internal
  8,  9, 10, 11, 12, 13
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*Surface, type=ELEMENT, name=bot
_bot_S5, S5
** Section: BrickSection
*Solid Section, elset=_PickedSet2, material="Concrete C30/37"
,
*End Part
**
*Part, name=DikeRigid
*End Part
**
*Part, name=Wall
*End Part
**
**
** ASSEMBLY
**
*Assembly, name=Assembly
**
*Instance, name=Block-2-lin-1-8-lin-2-1-lin-lin-10-1-3, part=Block
19.42954101247, 2.33203866242936,         -2.8
19.42954101247, 2.33203866242936,         -2.8, 18.4548784888718, 2.49020462214031, -2.95816595971094, 91.4702773561219
*End Instance
**
*Instance, name=Block-2-lin-1-8-lin-2-1-lin-lin-11-1-3, part=Block
20.3782243105366, 2.01581089646091,         -2.8
20.3782243105366, 2.01581089646091,         -2.8, 19.4035617869385, 2.17397685617185, -2.95816595971094, 91.4702773561219
*End Instance
**
*Instance, name=Block-2-lin-1-4-lin-11-1, part=Block
19.9038826615033, 2.17392477944513,       -2.525
19.9038826615033, 2.17392477944513,       -2.525, 18.9292201379052, 2.33209073915608, -2.68316595971094, 91.4702773561219
*End Instance
**
*Instance, name=Block-2-lin-1-8-lin-2-1-lin-lin-10-1-5, part=Block
19.42954101247, 2.33203866242936,         -1.7
19.42954101247, 2.33203866242936,         -1.7, 18.4548784888718, 2.49020462214031, -1.85816595971094, 91.4702773561219
*End Instance
**
*Instance, name=Block-2-lin-1-8-lin-2-1-lin-lin-11-1-5, part=Block
20.3782243105366, 2.01581089646091,         -1.7
20.3782243105366, 2.01581089646091,         -1.7, 19.4035617869385, 2.17397685617185, -1.85816595971094, 91.4702773561219
*End Instance
**
*Instance, name=Block-2-lin-1-6-lin-11-1, part=Block
19.9038826615033, 2.17392477944513,       -1.425
19.9038826615033, 2.17392477944513,       -1.425, 18.9292201379052, 2.33209073915608, -1.58316595971094, 91.4702773561219
*End Instance
**
*Instance, name=Block-2-lin-1-3-lin-11-1, part=Block
19.9038826615033, 2.17392477944513,       -3.075
19.9038826615033, 2.17392477944513,       -3.075, 18.9292201379052, 2.33209073915608, -3.23316595971095, 91.4702773561219
*End Instance
**
*Instance, name=Block-2-lin-1-8-lin-2-1-lin-lin-10-1-4, part=Block
19.42954101247, 2.33203866242936,        -2.25
19.42954101247, 2.33203866242936,        -2.25, 18.4548784888718, 2.49020462214031, -2.40816595971094, 91.4702773561219
*End Instance
**
*Instance, name=Block-2-lin-1-8-lin-2-1-lin-lin-11-1-4, part=Block
20.3782243105366, 2.01581089646091,        -2.25
20.3782243105366, 2.01581089646091,        -2.25, 19.4035617869385, 2.17397685617185, -2.40816595971094, 91.4702773561219
*End Instance
**
*Instance, name=Block-2-lin-1-5-lin-11-1, part=Block
19.9038826615033, 2.17392477944513,       -1.975
19.9038826615033, 2.17392477944513,       -1.975, 18.9292201379052, 2.33209073915608, -2.13316595971094, 91.4702773561219
*End Instance
**
*Instance, name=DikeRigid-1, part=DikeRigid
   67.511216,   -16.666352, -2.50000000000001
   67.511216,   -16.666352, -2.50000000000001,    67.511216,   -15.666352, -2.50000000000001,         180.
*Surface, type=CYLINDER, name=Surf-2
START, 40.611216042617, 16.666351872149
 LINE, 46.611216042617, 18.666351872149
 LINE, 46.6586502075094, 18.524049377438
 LINE, 57.1586502075196, 22.0240493774414
 LINE, 57.111216042617, 22.166351872149
 LINE, 65.511216042617, 24.966351872149
 LINE, 67.511216042617, 24.966351872149
 LINE, 67.511216042617, 16.666351872149
 LINE, 40.611216042617, 16.666351872149
*End Instance
**
*Instance, name=Wall-1, part=Wall
      -37.25,          3.5,         -0.5
      -37.25,          3.5,         -0.5, -38.2500000126881,          3.5,         -0.5, 89.9999992730282
*Surface, type=CYLINDER, name=Surf-Wall
START,        37.25,          4.5
 LINE,        37.25,           5.
 LINE,        63.75,           5.
 LINE,        63.75,          4.5
 LINE,        37.25,          4.5
*End Instance
**
*Instance, name=Wall-1-lin-1-2, part=Wall
      -37.25,          3.5,           5.
      -37.25,          3.5,           5., -38.2500000126881,          3.5,           5., 89.9999992730282
*Surface, type=CYLINDER, name=Surf-Wall
START,        37.25,          4.5
 LINE,        37.25,           5.
 LINE,        63.75,           5.
 LINE,        63.75,          4.5
 LINE,        37.25,          4.5
*End Instance
**
*Node
      1,           0.,           0.,           0.
*Node
      2,           0.,           0.,           1.
*Node
      3,           0.,           0.,           2.
*Nset, nset=_PickedSet485, internal
 1,
*Nset, nset=_PickedSet486, internal
 2,
*Nset, nset=_PickedSet487, internal
 3,
*Nset, nset=_PickedSet490, internal, instance=Block-2-lin-1-8-lin-2-1-lin-lin-10-1-3, generate
   1,  192,    1
*Nset, nset=_PickedSet490, internal, instance=Block-2-lin-1-8-lin-2-1-lin-lin-11-1-3, generate
   1,  192,    1
*Nset, nset=_PickedSet490, internal, instance=Block-2-lin-1-4-lin-11-1, generate
   1,  192,    1
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*Elset, elset=_PickedSet490, internal, instance=Block-2-lin-1-8-lin-2-1-lin-lin-10-1-3, generate
  1,  98,   1
*Elset, elset=_PickedSet490, internal, instance=Block-2-lin-1-8-lin-2-1-lin-lin-11-1-3, generate
  1,  98,   1
*Elset, elset=_PickedSet490, internal, instance=Block-2-lin-1-4-lin-11-1, generate
  1,  98,   1
*Elset, elset=_PickedSet490, internal, instance=Block-2-lin-1-8-lin-2-1-lin-lin-11-1-5, generate
  1,  98,   1
*Elset, elset=_PickedSet490, internal, instance=Block-2-lin-1-5-lin-11-1, generate
  1,  98,   1
*Elset, elset=_PickedSet490, internal, instance=Block-2-lin-1-8-lin-2-1-lin-lin-11-1-4, generate
  1,  98,   1
*Elset, elset=_PickedSet490, internal, instance=Block-2-lin-1-6-lin-11-1, generate
  1,  98,   1
*Elset, elset=_PickedSet490, internal, instance=Block-2-lin-1-3-lin-11-1, generate
  1,  98,   1
*Elset, elset=_PickedSet490, internal, instance=Block-2-lin-1-8-lin-2-1-lin-lin-10-1-5, generate
  1,  98,   1
*Elset, elset=_PickedSet490, internal, instance=Block-2-lin-1-8-lin-2-1-lin-lin-10-1-4, generate
  1,  98,   1
*Nset, nset=_PickedSet492, internal, generate
 1,  3,  1
*Elset, elset=_Bottoms_S5, internal, instance=Block-2-lin-1-8-lin-2-1-lin-lin-10-1-3
  8,  9, 10, 11, 12, 13
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*Elset, elset=_Bottoms_S5, internal, instance=Block-2-lin-1-8-lin-2-1-lin-lin-11-1-3
  8,  9, 10, 11, 12, 13
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*Elset, elset=_Bottoms_S5, internal, instance=Block-2-lin-1-4-lin-11-1
  8,  9, 10, 11, 12, 13
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*Elset, elset=_Bottoms_S5, internal, instance=Block-2-lin-1-8-lin-2-1-lin-lin-11-1-5
  8,  9, 10, 11, 12, 13
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*Elset, elset=_Bottoms_S5, internal, instance=Block-2-lin-1-5-lin-11-1
  8,  9, 10, 11, 12, 13
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*Elset, elset=_Bottoms_S5, internal, instance=Block-2-lin-1-8-lin-2-1-lin-lin-11-1-4
  8,  9, 10, 11, 12, 13
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*Elset, elset=_Bottoms_S5, internal, instance=Block-2-lin-1-6-lin-11-1
  8,  9, 10, 11, 12, 13
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*Elset, elset=_Bottoms_S5, internal, instance=Block-2-lin-1-3-lin-11-1
  8,  9, 10, 11, 12, 13
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*Elset, elset=_Bottoms_S5, internal, instance=Block-2-lin-1-8-lin-2-1-lin-lin-10-1-5
  8,  9, 10, 11, 12, 13
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*Elset, elset=_Bottoms_S5, internal, instance=Block-2-lin-1-8-lin-2-1-lin-lin-10-1-4
  8,  9, 10, 11, 12, 13
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*Surface, type=ELEMENT, name=Bottoms
_Bottoms_S5, S5
*Elset, elset=__PickedSurf478_S3, internal, instance=Block-2-lin-1-8-lin-2-1-lin-lin-11-1-3
  1,  2,  3,  4,  5,  6
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*Elset, elset=__PickedSurf478_S3, internal, instance=Block-2-lin-1-8-lin-2-1-lin-lin-11-1-5
  1,  2,  3,  4,  5,  6
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*Elset, elset=__PickedSurf478_S3, internal, instance=Block-2-lin-1-8-lin-2-1-lin-lin-11-1-4
  1,  2,  3,  4,  5,  6
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*Surface, type=ELEMENT, name=_PickedSurf478, internal
__PickedSurf478_S3, S3
*Elset, elset=__PickedSurf479_S3, internal, instance=Block-2-lin-1-4-lin-11-1
  1,  2,  3,  4,  5,  6
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*Elset, elset=__PickedSurf479_S3, internal, instance=Block-2-lin-1-6-lin-11-1
  1,  2,  3,  4,  5,  6
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*Elset, elset=__PickedSurf479_S3, internal, instance=Block-2-lin-1-3-lin-11-1
  1,  2,  3,  4,  5,  6
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*Elset, elset=__PickedSurf479_S3, internal, instance=Block-2-lin-1-5-lin-11-1
  1,  2,  3,  4,  5,  6
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*Surface, type=ELEMENT, name=_PickedSurf479, internal
__PickedSurf479_S3, S3
*Elset, elset=__PickedSurf480_S3, internal, instance=Block-2-lin-1-8-lin-2-1-lin-lin-10-1-3
  1,  2,  3,  4,  5,  6
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*Elset, elset=__PickedSurf480_S3, internal, instance=Block-2-lin-1-8-lin-2-1-lin-lin-10-1-5
  1,  2,  3,  4,  5,  6
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*Elset, elset=__PickedSurf480_S3, internal, instance=Block-2-lin-1-8-lin-2-1-lin-lin-10-1-4
  1,  2,  3,  4,  5,  6
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*Surface, type=ELEMENT, name=_PickedSurf480, internal
__PickedSurf480_S3, S3
** Constraint: Constraint-1
*Rigid Body, ref node=_PickedSet485, analytical surface=DikeRigid-1.Surf-2
** Constraint: Constraint-2
*Rigid Body, ref node=_PickedSet486, analytical surface=Wall-1.Surf-Wall
** Constraint: Constraint-3
*Rigid Body, ref node=_PickedSet487, analytical surface=Wall-1-lin-1-2.Surf-Wall
*End Assembly
*Amplitude, name=Row1
             0.,              0.,            0.01,              0.,            0.02,              0.,            0.03,              0.
           0.04,              0.,            0.05,              0.,            0.06,              0.,            0.07,              0.
           0.08,              0.,            0.09,              0.,             0.1,              0.,            0.11,              0.
           0.12,              0.,            0.13,              0.,            0.14,              0.,            0.15,              0.
           0.16,              0.,            0.17,              0.,            0.18,              0.,            0.19,              0.
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          11.96,              0.,           11.97,              0.,           11.98,              0.,           11.99,              0.
*Amplitude, name=Row2
             0.,              0.,            0.01,              0.,            0.02,              0.,            0.03,              0.
           0.04,              0.,            0.05,              0.,            0.06,              0.,            0.07,              0.
           0.08,              0.,            0.09,              0.,             0.1,              0.,            0.11,              0.
           0.12,              0.,            0.13,              0.,            0.14,              0.,            0.15,              0.
           0.16,              0.,            0.17,              0.,            0.18,              0.,            0.19,              0.
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          11.96,              0.,           11.97,              0.,           11.98,              0.,           11.99,              0.
*Amplitude, name=Row3
             0.,              0.,            0.01,              0.,            0.02,              0.,            0.03,              0.
           0.04,              0.,            0.05,              0.,            0.06,              0.,            0.07,              0.
           0.08,              0.,            0.09,              0.,             0.1,              0.,            0.11,              0.
           0.12,              0.,            0.13,              0.,            0.14,              0.,            0.15,              0.
           0.16,              0.,            0.17,              0.,            0.18,              0.,            0.19,              0.
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          11.96,              0.,           11.97,              0.,           11.98,              0.,           11.99,              0.
**
** MATERIALS
**
*Material, name="Concrete C30/37"
*Density
2300.,
*Elastic
 3e+10, 0.18
**
** INTERACTION PROPERTIES
**
*Surface Interaction, name=BLOCK-FILTER
*Friction
 0.6,
*Surface Behavior, pressure-overclosure=HARD
*Surface Interaction, name=IntProp-1
*Friction
 0.85,
*Surface Behavior, pressure-overclosure=HARD
**
** BOUNDARY CONDITIONS
**
** Name: BC-1 Type: Displacement/Rotation
*Boundary
_PickedSet492, 1, 1
_PickedSet492, 2, 2
_PickedSet492, 3, 3
_PickedSet492, 4, 4
_PickedSet492, 5, 5
_PickedSet492, 6, 6
**
** INTERACTIONS
**
** Interaction: Int-2
*Contact, op=NEW
*Contact Inclusions, ALL EXTERIOR
** ----------------------------------------------------------------
**
** STEP: Gravity
**
*Step, name=Gravity, nlgeom=YES
*Dynamic, Explicit
, 1.
*Bulk Viscosity
0.06, 1.2
**
** LOADS
**
** Name: Gravity   Type: Gravity
*Dload
_PickedSet490, GRAV, 9.81, 0., -1., 0.
**
** OUTPUT REQUESTS
**
*Restart, write, number interval=1, time marks=NO
**
** FIELD OUTPUT: F-Output-2
**
*Output, field, variable=PRESELECT
**
** HISTORY OUTPUT: H-Output-2
**
*Output, history, variable=PRESELECT
*End Step
** ----------------------------------------------------------------
**
** STEP: Loading
**
*Step, name=Loading, nlgeom=YES
Gravity
*Dynamic, Explicit, direct user control
0.01, 12.
*Bulk Viscosity
0.06, 1.2
**
** LOADS
**
** Name: Row1   Type: Pressure
*Dsload, amplitude=Row1
_PickedSurf478, P, -1.
** Name: Row2   Type: Pressure
*Dsload, amplitude=Row2
_PickedSurf479, P, -1.
** Name: Row3   Type: Pressure
*Dsload, amplitude=Row3
_PickedSurf480, P, -1.
**
** OUTPUT REQUESTS
**
*Restart, write, number interval=1, time marks=NO
**
** FIELD OUTPUT: F-Output-1, F-Output-2
**
*Output, field, variable=PRESELECT
**
** HISTORY OUTPUT: H-Output-1, H-Output-2
**
*Output, history, variable=PRESELECT
*End Step
